<Lems>

  <!-- Tell jLEMS/jNeuroML which component is the simulation entry point. -->
  <Target component="sim_Generic2dOscillator_LEMS_Export"/>

  <Include file="Cells.xml"/>
  <Include file="Networks.xml"/>
  <Include file="Simulation.xml"/>

  <!-- ════════════════════════════════════════════════════════════════
       Dynamics ComponentType & Component instances
       ════════════════════════════════════════════════════════════════ -->

  <!-- ════════════════════════════════════════════════════════════════
       ComponentType: Generic2dOscillator
       Generated from TVBO Dynamics: Generic2dOscillator
       ════════════════════════════════════════════════════════════════ -->
  <ComponentType name="Generic2dOscillator">

    <!-- Parameters -->
    <Parameter name="I" dimension="none"/>
    <Parameter name="a" dimension="none"/>
    <Parameter name="alpha" dimension="none"/>
    <Parameter name="b" dimension="none"/>
    <Parameter name="beta" dimension="none"/>
    <Parameter name="c" dimension="none"/>
    <Parameter name="d" dimension="none"/>
    <Parameter name="e" dimension="none"/>
    <Parameter name="f" dimension="none"/>
    <Parameter name="g" dimension="none"/>
    <Parameter name="gamma" dimension="none"/>
    <Parameter name="tau" dimension="none"/>
    <!-- Coupling inputs -->
    <Parameter name="c_glob" dimension="none"/>
    <Parameter name="local_coupling" dimension="none"/>
    <!-- Initial condition parameters -->
    <Parameter name="V_0" dimension="none"/>
    <Parameter name="W_0" dimension="none"/>

    <!-- Time conversion for derivatives.
         When all parameters and state variables carry proper LEMS dimensions,
         LEMS handles unit conversion natively (e.g. tau="30 ms" → 0.03 s).
         No SEC constant is needed and TimeDerivatives use the RHS directly.
         When dimensions are "none" (dimensionless models), / SEC converts
         from model time to SI seconds.
         all_dimensioned=False  needs_sec=True  time_scale=ms -->
    <Constant name="SEC" dimension="time" value="1ms"/>

    <!-- Exposures (one per state variable) -->
    <Exposure name="V" dimension="none"/>
    <Exposure name="W" dimension="none"/>

    <Dynamics>

      <!-- State variables -->
      <StateVariable name="V" dimension="none" exposure="V"/>
      <StateVariable name="W" dimension="none" exposure="W"/>

      <!-- Derived variables (simple and conditional/piecewise) -->

      <!-- ── Flat dynamics (no spike events) ── -->

      <!-- Time derivatives -->
      <TimeDerivative variable="V" value="(d*tau*(I*gamma + V*g + V*local_coupling + W*alpha + c_glob*gamma + e*V^2 - f*V^3)) / SEC"/>
      <TimeDerivative variable="W" value="(d*(a + V*b + c*V^2 - W*beta)/tau) / SEC"/>

      <!-- Initial conditions -->
      <OnStart>
        <StateAssignment variable="V" value="V_0"/>
        <StateAssignment variable="W" value="W_0"/>
      </OnStart>

      <!-- Events (non-spike) -->

    </Dynamics>

  </ComponentType>

  <!-- ════════════════════════════════════════════════════════════════
       Component instances (default parameter values)
       ════════════════════════════════════════════════════════════════ -->
  <Component id="Generic2dOscillator_inst" type="Generic2dOscillator" I="0.0" a="-2.0" alpha="1.0" b="-10.0" beta="1.0" c="0.0" d="0.02" e="3.0" f="1.0" g="0.0" gamma="1.0" tau="1.0" c_glob="0" local_coupling="0" V_0="0.1" W_0="0.1"/>

  <!-- Wrap the single cell in a network so quantity paths use the standard
       pop[idx]/variable form, which works across jNeuroML, NEURON, Brian2,
       NetPyNE and EDEN backends. -->
  <network id="net">
    <population id="pop" component="Generic2dOscillator_inst" size="1"/>
  </network>

  <!-- ════════════════════════════════════════════════════════════════
       Simulation — target the network (all-backend compatible)
       ════════════════════════════════════════════════════════════════ -->
  <Simulation id="sim_Generic2dOscillator_LEMS_Export" length="1000.0ms" step="0.01220703125ms" target="net">

    <OutputFile id="of1" fileName="results/Generic2dOscillator.dat">
      <OutputColumn id="V" quantity="pop[0]/V"/>
      <OutputColumn id="W" quantity="pop[0]/W"/>
    </OutputFile>

  </Simulation>

</Lems>
